<?xml version="1.0"?>
<Node     name="root" gravity="0 0 -9.81" dt="0.005" showVisualModels="1" showBehaviorModels="1" showCollisionModels="0" showBoundingCollisionModels="0" showMappings="0" showMechanicalMappings="0" showForceFields="0" showInteractionForceFields="0" showWireFrame="0" showNormals="0"  >
    <DefaultPipeline name="DefaultCollisionPipeline"  verbose="0"  draw="0"  depth="6" />
    <BruteForceDetection name="Detection" />
    <MinProximityIntersection name="Proximity"  alarmDistance="1"  contactDistance="1" />
    <MechanicalObject template="Rigid3f" name="souris_mors2"  position="0 0 0 0 0 0 1"  velocity="0 0 0 0 0 0"  force="0 0 0 0 0 0"  internalForce="0 0 0 0 0 0"  externalForce="0 0 0 0 0 0"  derivX="0 0 0 0 0 0"  free_position="0 0 0 0 0 0 1"  free_velocity="0 0 0 0 0 0"  restScale="1"  debugViewIndicesScale="0.0001" />
    <DefaultContactManager name="Response"  response="default" />
    <MechanicalObject template="Rigid3f" name="souris_cam"  position="0 0 0 0 0 0 1"  velocity="0 0 0 0 0 0"  force="0 0 0 0 0 0"  internalForce="0 0 0 0 0 0"  externalForce="0 0 0 0 0 0"  derivX="0 0 0 0 0 0"  free_position="0 0 0 0 0 0 1"  free_velocity="0 0 0 0 0 0"  restScale="1"  debugViewIndicesScale="0.0001" />

    <Node     name="mors2" gravity="0 -9.81 0" showVisualModels="1" showBehaviorModels="1" showCollisionModels="0" showBoundingCollisionModels="0" showMappings="0" showMechanicalMappings="0" showForceFields="0" showInteractionForceFields="0" showWireFrame="0" showNormals="0"  >
        <CGLinearSolver template="GraphScattered" name="Conjugate Gradient" />
        <SparseGridTopology name="Embedded Sparse Grid"  fileTopology="mors2.trian"  n="7 6 5" />
        <MechanicalObject template="Vec3d" name="Particles"  position="1000 0 0"  velocity="0 0 0"  force="0 0 0"  internalForce="0 0 0"  externalForce="0 0 0"  derivX="0 0 0"  free_position="0 0 0"  free_velocity="0 0 0"  restScale="1"  debugViewIndicesScale="0.0001" />
        <UniformMass template="Vec3d" name="Mass" />
        <PlaneForceField template="Vec3d" name="Plane"  normal="0 0 1"  d="-10" />
        <HexahedronFEMForceField template="Vec3d" name="FEM"  youngModulus="200" />
        <EulerImplicitSolver name="Implicit Euler Solver" />
        <RigidMapping template="MechanicalMapping&lt;Rigid3f,Vec3d&gt;" name="default0"  object1="../../souris_mors2" />
        <LineModel name="default0"  contactStiffness="500" />
        <PointModel name="default1"  contactStiffness="500" />
        <Node     name="Visual" gravity="0 -9.81 0" showVisualModels="1" showBehaviorModels="1" showCollisionModels="0" showBoundingCollisionModels="0" showMappings="0" showMechanicalMappings="0" showForceFields="0" showInteractionForceFields="0" showWireFrame="0" showNormals="0"  >
            <OglModel template="ExtVec3f" name="mors2"  fileMesh="mors2.trian"  material="Default Diffuse 1 0.74902 0.74902 0.74902 1 Ambient 1 0.2 0.2 0.2 1 Specular 0 1 1 1 1 Emissive 0 0 0 0 0 Shininess 0 45" />
            <BarycentricMapping template="Mapping&lt;Vec3d,ExtVec3f&gt;" name="default28"  object1="../../Particles"  object2="mors2" />
        </Node>
    </Node>

    <Node     name="cam" gravity="0 -9.81 0" showVisualModels="1" showBehaviorModels="1" showCollisionModels="0" showBoundingCollisionModels="0" showMappings="0" showMechanicalMappings="0" showForceFields="0" showInteractionForceFields="0" showWireFrame="0" showNormals="0"  >
        <CGLinearSolver template="GraphScattered" name="Conjugate Gradient" />
        <SparseGridTopology name="Embedded Sparse Grid"  fileTopology="cam.trian"  n="7 6 5" />
        <MechanicalObject template="Vec3d" name="Particles"  position="1000 0 0"  velocity="0 0 0"  force="0 0 0"  internalForce="0 0 0"  externalForce="0 0 0"  derivX="0 0 0"  free_position="0 0 0"  free_velocity="0 0 0"  restScale="1"  debugViewIndicesScale="0.0001" />
        <UniformMass template="Vec3d" name="Mass" />
        <PlaneForceField template="Vec3d" name="Plane"  normal="0 0 1"  d="-10" />
        <HexahedronFEMForceField template="Vec3d" name="FEM"  youngModulus="200" />
        <EulerImplicitSolver name="Implicit Euler Solver" />
        <RigidMapping template="MechanicalMapping&lt;Rigid3f,Vec3d&gt;" name="default0"  object1="../../souris_cam" />
        <LineModel name="default0"  contactStiffness="500" />
        <PointModel name="default1"  contactStiffness="500" />
        <Node     name="Visual" gravity="0 -9.81 0" showVisualModels="1" showBehaviorModels="1" showCollisionModels="0" showBoundingCollisionModels="0" showMappings="0" showMechanicalMappings="0" showForceFields="0" showInteractionForceFields="0" showWireFrame="0" showNormals="0"  >
            <OglModel template="ExtVec3f" name="cam"  fileMesh="cam.trian"  material="Default Diffuse 1 0.74902 0.74902 0.74902 1 Ambient 1 0.2 0.2 0.2 1 Specular 0 1 1 1 1 Emissive 0 0 0 0 0 Shininess 0 45" />
            <BarycentricMapping template="Mapping&lt;Vec3d,ExtVec3f&gt;" name="default28"  object1="../../Particles"  object2="cam" />
        </Node>
    </Node>


AREMPLACER


</Node>
